units si
atom_style sphere
boundary p p p
newton off
processors 1 1 1
read_data particles.data
comm_modify vel yes
pair_style zero 6e-6
pair_coeff * *
neighbor 1e-6 bin
neigh_modify every 1 delay 0 check no
fix passive all sonovue/passive/flow ../../fields/FROZEN_FLOW_FIELD_V0.h5 8 trajectory ../../provenance/closed_geometry_m.stl 5.9969754243196026e-07 0
timestep 2.8958747102893354e-05
thermo 602
thermo_style custom step atoms time
thermo_modify lost error norm no format float %.17g
run 0
write_dump all custom initial.dump id diameter xu yu zu vx vy vz modify sort id format float %.17g
run 6020
write_dump all custom final.dump id diameter xu yu zu vx vy vz modify sort id format float %.17g
print "PASSIVE_CASE_COMPLETED"
